*Heading
** Job name: Job-1 Model name: Model-1
** Generated by: Abaqus/CAE 2021
*Preprint, echo=NO, model=NO, history=NO, contact=NO
**
** PARTS
**
*Part, name=PART-SOIL
*Node
      1, 0.0250000004, 0.0250000004, 0.0250000004
      2, 0.0250000004, 0.0166666675, 0.0250000004
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*Element, type=C3D8R
 1, 17, 18, 22, 21,  1,  2,  6,  5
 2, 18, 19, 23, 22,  2,  3,  7,  6
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*Nset, nset=SET-SOIL, generate
  1,  64,   1
*Elset, elset=SET-SOIL, generate
  1,  27,   1
*Nset, nset=SET-SOIL-X0, generate
 49,  64,   1
*Elset, elset=SET-SOIL-X0, generate
 19,  27,   1
*Nset, nset=SET-SOIL-Y0, generate
  4,  64,   4
*Elset, elset=SET-SOIL-Y0, generate
  3,  27,   3
*Nset, nset=SET-SOIL-Z0
 13, 14, 15, 16, 29, 30, 31, 32, 45, 46, 47, 48, 61, 62, 63, 64
*Elset, elset=SET-SOIL-Z0
  7,  8,  9, 16, 17, 18, 25, 26, 27
*Nset, nset=SET-SOIL-X1, generate
  1,  16,   1
*Elset, elset=SET-SOIL-X1, generate
 1,  9,  1
*Nset, nset=SET-SOIL-Y1, generate
  1,  61,   4
*Elset, elset=SET-SOIL-Y1, generate
  1,  25,   3
*Nset, nset=SET-SOIL-Z1
  1,  2,  3,  4, 17, 18, 19, 20, 33, 34, 35, 36, 49, 50, 51, 52
*Elset, elset=SET-SOIL-Z1
  1,  2,  3, 10, 11, 12, 19, 20, 21
*Elset, elset=_SURFACE-SOIL-Z0_S5, internal
  7,  8,  9, 16, 17, 18, 25, 26, 27
*Surface, type=ELEMENT, name=SURFACE-SOIL-Z0
_SURFACE-SOIL-Z0_S5, S5
*Elset, elset=_SURFACE-SOIL-Z1_S3, internal
  1,  2,  3, 10, 11, 12, 19, 20, 21
*Surface, type=ELEMENT, name=SURFACE-SOIL-Z1
_SURFACE-SOIL-Z1_S3, S3
** Section: SECTION-SOIL
*Solid Section, elset=SET-SOIL, controls=EC-1, material=MATERIAL-SOIL
,
*End Part
**
*Part, name=PART-SOLID
*Node
      1, 0.0500000007, 0.0500000007, 0.0500000007
      2, 0.0500000007, 0.0399999991, 0.0500000007
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*Element, type=C3D8R
  1,  37,  38,  44,  43,   1,   2,   8,   7
  2,  38,  39,  45,  44,   2,   3,   9,   8
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*Node
    217,           0.,           0.,           0.
*Nset, nset=PART-SOLID-RefPt_, internal
217,
*Nset, nset=SET-SOLID, generate
   1,  216,    1
*Elset, elset=SET-SOLID, generate
   1,  125,    1
*Nset, nset=SET-SOLID-X0, generate
 181,  216,    1
*Elset, elset=SET-SOLID-X0, generate
 101,  125,    1
*Nset, nset=SET-SOLID-Y0, generate
   6,  216,    6
*Elset, elset=SET-SOLID-Y0, generate
   5,  125,    5
*Nset, nset=SET-SOLID-Z0
  31,  32,  33,  34,  35,  36
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*Elset, elset=SET-SOLID-Z0
  21,  22,  23,  24,  25,  46
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*Nset, nset=SET-SOLID-X1, generate
  1,  36,   1
*Elset, elset=SET-SOLID-X1, generate
  1,  25,   1
*Nset, nset=SET-SOLID-Y1, generate
   1,  211,    6
*Elset, elset=SET-SOLID-Y1, generate
   1,  121,    5
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*Nset, nset=SET-RP
 217,
*Elset, elset=_SURFACE-SOLID-Z0_S5, internal
  21,  22,  23,  24,  25,  46
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*Surface, type=ELEMENT, name=SURFACE-SOLID-Z0
_SURFACE-SOLID-Z0_S5, S5
*Elset, elset=_SURFACE-SOLID-Z1_S3, internal
   1,   2,   3,   4,   5,  26
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*Surface, type=ELEMENT, name=SURFACE-SOLID-Z1
_SURFACE-SOLID-Z1_S3, S3
** Section: SECTION-SOLID
*Solid Section, elset=SET-SOLID, controls=EC-1, material=MATERIAL-SOLID
,
*End Part
**
**
** ASSEMBLY
**
*Assembly, name=Assembly
**
*Instance, name=INSTANCE-SOIL, part=PART-SOIL
      0.0125,       0.0125,         0.05
*End Instance
**
*Instance, name=INSTANCE-SOLID, part=PART-SOLID
*End Instance
**
** Constraint: RIGID-BODY-SOLID
*Rigid Body, ref node=INSTANCE-SOLID.SET-RP, elset=INSTANCE-SOLID.SET-SOLID
*End Assembly
**
** ELEMENT CONTROLS
**
*Section Controls, name=EC-1, hourglass=ENHANCED
1., 1., 1.
**
** MATERIALS
**
*Material, name=MATERIAL-SOIL
*Density
1700.,
*Elastic
40000.,0.
*Material, name=MATERIAL-SOLID
*Density
2000.,
*Elastic
 2e+08,0.
**
** INTERACTION PROPERTIES
**
*Surface Interaction, name=IntProp-1
1.,
*Friction, slip tolerance=0.005
 0.1,
*Surface Behavior, pressure-overclosure=HARD
**
** BOUNDARY CONDITIONS
**
** Name: BC-RP Type: Displacement/Rotation
*Boundary
INSTANCE-SOLID.SET-RP, 1, 1
INSTANCE-SOLID.SET-RP, 2, 2
INSTANCE-SOLID.SET-RP, 3, 3
INSTANCE-SOLID.SET-RP, 4, 4
INSTANCE-SOLID.SET-RP, 5, 5
INSTANCE-SOLID.SET-RP, 6, 6
** Name: BC-SOIL-X0 Type: Displacement/Rotation
*Boundary
INSTANCE-SOIL.SET-SOIL-X0, 1, 1
** Name: BC-SOIL-X1 Type: Displacement/Rotation
*Boundary
INSTANCE-SOIL.SET-SOIL-X1, 1, 1
** Name: BC-SOIL-Y0 Type: Displacement/Rotation
*Boundary
INSTANCE-SOIL.SET-SOIL-Y0, 2, 2
** Name: BC-SOIL-Y1 Type: Displacement/Rotation
*Boundary
INSTANCE-SOIL.SET-SOIL-Y1, 2, 2
**
** PREDEFINED FIELDS
**
** Name: SOIL-PREDEFINED-STRESS   Type: Stress
*Initial Conditions, type=STRESS
INSTANCE-SOIL.SET-SOIL, -310., -310., -310., 0., 0., 0.
**
** INTERACTIONS
**
** Interaction: Int-1
*Contact Pair, interaction=IntProp-1, type=SURFACE TO SURFACE
INSTANCE-SOIL.SURFACE-SOIL-Z0, INSTANCE-SOLID.SURFACE-SOLID-Z1
** ----------------------------------------------------------------
**
** STEP: INITIAL-STRESS
**
*Step, name=INITIAL-STRESS, nlgeom=NO, inc=1000, unsymm=YES
*Static
0.001, 1., 1e-05, 1.
**
** LOADS
**
** Name: SOIL-VERTICAL-PRESSURE   Type: Pressure
*Dsload
INSTANCE-SOIL.SURFACE-SOIL-Z1, P, 310.
**
** OUTPUT REQUESTS
**
*Restart, write, frequency=0
*Output, field, frequency=0
*Output, history, frequency=0
*End Step
** ----------------------------------------------------------------
**
** STEP: SHEAR
**
*Step, name=SHEAR, nlgeom=NO, inc=1000, unsymm=YES
*Static
0.001, 1., 1e-05, 1.
**
** BOUNDARY CONDITIONS
**
** Name: BC-RP Type: Displacement/Rotation
*Boundary
INSTANCE-SOLID.SET-RP, 1, 1, 0.006
INSTANCE-SOLID.SET-RP, 2, 2
INSTANCE-SOLID.SET-RP, 3, 3
INSTANCE-SOLID.SET-RP, 4, 4
INSTANCE-SOLID.SET-RP, 5, 5
INSTANCE-SOLID.SET-RP, 6, 6
**
** OUTPUT REQUESTS
**
*Restart, write, frequency=0
**
** FIELD OUTPUT: F-Output-1
**
*Output, field, time interval=0.01
*Node Output
RF, RM, RT, U
*Element Output, directions=YES
E, LE, P, S
*Contact Output
CDISP, CFORCE, CNAREA, CSTATUS, CSTRESS
**
** HISTORY OUTPUT: H-Output-1
**
*Output, history
*Node Output, nset=INSTANCE-SOLID.SET-RP
RF1, U1
*End Step
